V_УК1 := π*62/12*(153^2 + 153*(153 + 62*tan(1 deg)) + (153 + 62*tan(1 deg))^2 - 3*153^2) = 8081.82  # мм^3
V_дет := π*153^2/4*155 - π*90^2/4*155 - π*37^2/4*63 + π*265^2/4*31 - π*153^2/4*31 - 2*π*22^2/4*31
V_УК2 := π*31/12*(265^2 + 265*(265 + 31*tan(1.5 deg)) + (265 + 31*tan(1.5 deg))^2 - 3*265^2) = 5242.88
V_дет = 2912206  # мм^3
V_УК3 := π*25/12*(153^2 + 153*(153 + 25*tan(1.5 deg)) + (153 + 25*tan(1.5 deg))^2 - 3*153^2) = 1969.46
V_пр := π/4*(90^2 - 87^2)*155 + π/4*(153^2 - 90^2)*5 + π/4*(265^2 - 153^2)*3 = 235068  # мм^3
V_ОТВ := 2*(π/4*22^2*31) = 23568.2
V_отл := V_дет + V_пр + V_УК1 + V_УК2 + V_УК3 + V_ОТВ = 3186137
КИМ := V_дет/V_отл*100 = 91.4024  # %
V_пр = 235068
