V_дет := π*153^2/4*155 - π*90^2/4*155 - π*37^2/4*63 + π*265^2/4*31 - π*153^2/4*31 - 2*π*22^2/4*31
V_УК1 := 2*(π/12*56*tan(1 deg)*(153^2 + 153*265 + 265^2 - 3*156^2)) = 31307.9  # мм^3
V_дет = 2912206  # мм^3
V_УК2 := 2*(π/12*63/2*tan(1.5 deg)*(153^2 + 153*90 + 90^2 - 3*90^2)) = 9060.7  # мм^3
V_ОТВ := 2*(π/4*22^2*31) = 23568.2  # мм^3
V_пр := π/4*(90^2 - 87^2)*155 + π/4*(153^2 - 90^2)*3 + π/4*(265^2 - 153^2)*3 = 211021  # мм^3
V_отл := V_дет + V_пр + V_УК1 + V_УК2 + V_ОТВ = 3187164  # мм^3
V_пр = 211021
КИМ := V_дет/V_отл*100 = 91.373  # %
